P_km(V_k) := (V_k^2*g_km - tap_km*V_k*V_m*(g_km*cos(θ_k - θ_m) + b_km*sen(θ_k - θ_m)))
P_km(V_m) := (V_k^2*g_km - tap_km*V_k*V_m*(g_km*cos(θ_k - θ_m) + b_km*sen(θ_k - θ_m)))
P_km(θ_k) := (V_k^2*g_km - tap_km*V_k*V_m*(g_km*cos(θ_k - θ_m) + b_km*sen(θ_k - θ_m)))
P_km(θ_m) := (V_k^2*g_km - tap_km*V_k*V_m*(g_km*cos(θ_k - θ_m) + b_km*sen(θ_k - θ_m)))
d/dV_k(P_km(V_k)) → V_k*V_m*b_km*tap_km*sen'(θ_k - V_k) - V_k*V_m*g_km*tap_km*sin(θ_k - V_k)
d/dV_m(P_km(V_m)) → V_k*V_m*b_km*tap_km*sen'(θ_k - V_m) - V_k*V_m*g_km*tap_km*sin(θ_k - V_m)
d/dθ_k(P_km(θ_k)) → V_k*V_m*b_km*tap_km*sen'(-θ_k + θ_k) + V_k*V_m*g_km*tap_km*sin(θ_k - θ_k)
d/dθ_m(P_km(θ_m)) → V_k*V_m*b_km*tap_km*sen'(-θ_m + θ_k) + V_k*V_m*g_km*tap_km*sin(θ_m - θ_k)
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P_mk(V_k) := (V_m^2*g_km*tap_km - V_k*V_m*tap_km*(g_km*cos(θ_k - θ_m) - b_km*sen(θ_k - θ_m)))
P_mk(V_m) := (V_m^2*g_km*tap_km - V_k*V_m*tap_km*(g_km*cos(θ_k - θ_m) - b_km*sen(θ_k - θ_m)))
P_mk(θ_k) := (V_m^2*g_km*tap_km - V_k*V_m*tap_km*(g_km*cos(θ_k - θ_m) - b_km*sen(θ_k - θ_m)))
P_mk(θ_m) := (V_m^2*g_km*tap_km - V_k*V_m*tap_km*(g_km*cos(θ_k - θ_m) - b_km*sen(θ_k - θ_m)))
d/dV_k(P_mk(V_k)) → -(V_k*V_m*b_km*tap_km*sen'(θ_k - V_k)) - V_k*V_m*g_km*tap_km*sin(θ_k - V_k)
d/dV_m(P_mk(V_m)) → -(V_k*V_m*b_km*tap_km*sen'(θ_k - V_m)) - V_k*V_m*g_km*tap_km*sin(θ_k - V_m)
d/dθ_k(P_mk(θ_k)) → -(V_k*V_m*b_km*tap_km*sen'(-θ_k + θ_k)) + V_k*V_m*g_km*tap_km*sin(θ_k - θ_k)
d/dθ_m(P_mk(θ_m)) → -(V_k*V_m*b_km*tap_km*sen'(-θ_m + θ_k)) + V_k*V_m*g_km*tap_km*sin(θ_m - θ_k)
